s(n) :=
    1 if n == 0
    0 otherwise
ω0 := 2.5
α := 0.92
A := 8
T := 25
o := 0, 0.1 .. 5*T
tstart := -10
tend := 20
n := tstart .. tend
D := 2.5
y(t) := α^t*sin(ω0*t)
[NumChannels; SampleRate; Resolution; AvgBytesPerSecond] := GETWAVINFO("C:\Users\zharg\Documents\MathMethodST\oceanwav.wav")
x(n) :=
    D if n ≥ 0
    0 if n < 0
k := 3
r(o) := A/T*(o - T*floor(o/T))
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AvgBytesPerSecond = 176400
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NumChannels = 2
SampleRate = 44100
Resolution = 16
Wardata := READWAV("C:\Users\zharg\Documents\MathMethodST\oceanwav.wav")
n := 0 .. length(Wardata[:, 0]) - 1
time[n] := n/SampleRate
tstart := -20
tend := 20
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N := 40
i := 0 .. N
A := 1
T := 2.5
o := 0, 0.01 .. 5*T
h := (tend - tstart)/N
r(o) := A*floor(o/T)
t[i] := i*h + tstart
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A := 2.5
t := 0, 0.1 .. 6*π
s(t) := A*sign(sin(t))
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AFK(τ) := integral(Wardata[:, 0]*(Wardata[:, 0] + τ), time = 0 .. 4.8)/4.8
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A := 2.5
t := 0, 0.01 .. 6*π
s(t) := 2*A/π*asin(sin(t))
α
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FK(τ) := integral(Wardata[:, 0]*(Wardata[:, 1] + τ), time = 0 .. 4.805)/4.8
n := gaussn(129)
i := 0 .. 128
s(i) := sin(i/5) + 0.25*n[i]
p(i) := s(i)^2
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P := sum(s(i)^2, i = 0 .. 128)/129
E := sum(s(i)^2, i = 0 .. 128)
P = 0.529217
E = 68.269
n := gaussn(129)
i := 0 .. 128
s(i) := sin(i/5) + 0.5*n[i]
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T1 := 25
t := 0 .. 4*T1
a[t] := sin(2*π*t/T1)*exp(-t/100)
m := 10
Q := quantize(a, m)
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