A := 2
τ := 0.5
T := 0.8  # Вариант 22
T_ := 0.7
# Задание  2.1
s(t) :=
    A*exp(-t/τ) if 0 ≤ t ≤ T_
    0 otherwise
k := 0 .. 15
t := -3*π, -3*π + 0.01 .. 3*π
a[k] := 2/T*integral(s(t)*cos(k*2*π/T*t), t = 0 .. T)
b[k] := 2/T*integral(s(t)*sin(k*2*π/T*t), t = 0 .. T)
a = [1.88351; 0.0214476; -0.0373601; -0.0157356; 0.0125797; 0.0297397; 0.0306128; 0.0185652; 0.00190646; -0.0106732; -0.0140686; -0.00851364; 0.00140278; 0.00966186; 0.0120366; 0.00799308]
b = [0; 0.520151; 0.323067; 0.250545; 0.197601; 0.148011; 0.104804; 0.0744121; 0.0598932; 0.0587033; 0.0640202; 0.0681632; 0.0661043; 0.0573205; 0.0452539; 0.0349051]
S(t, N) := a[0]/2 + sum(a[k]*cos(k*2*π/T*t) + b[k]*sin(k*2*π/T*t), k = 1 .. N)
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ε(t, N) := |s(t) - S(t, N)|
N := 1 .. 15
D(N) := integral((s(t) - S(t, N))^2, t = -1 .. 1)
ABS(N) := integral(ε(t, N), t = -1 .. 1)
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АЧХ
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