A := 2
ω := π
τ := 0.5
T := 0.8
s(t) := A*sign(sin(ω*(t + τ/2))) + A
t := -3*π, -3*π + 0.01 .. 3*π
m := 15
k := 0 .. m
a[k] := integral(s(t)*cos(k*π*t/τ), t = -τ/2 .. τ/2)
b[k] := integral(s(t)*sin(k*π*t/τ), t = -τ/2 .. τ/2)
b = [0; 0; 0; 0; 0; 0; 0; 0; 0; 0; 0; 0; 0; 0; 0; 0]
a = [2; 1.27324; 0; -0.424413; 0; 0.254648; 0; -0.181891; 0; 0.141471; 0; -0.115749; 0; 0.0979415; 0; -0.0848826]
S(t, N) := a[0/2] + sum(a[k]*cos(k*2*π*t/T) + b[k]*sin(k*2*π*t/2), k = 1 .. N)
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