A := 2
Tc := 0.7
T := 0.8
τ := 0.5
s(t) :=
    (A*exp(-t/τ)) if 0 ≤ t ≤ Tc
    0 otherwise
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a(ω) := integral(s(t)*cos(ω*t), t = 0 .. Tc)
b(ω) := integral(s(t)*sin(ω*t), t = 0 .. Tc)
φ(ω) := arg(a(ω) - 1i*b(ω))
X(ω) := sqrt(a(ω)^2 + b(ω)^2)
ω := 0, 0.1 .. 10
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ωc := 10
S(t) := 1/π*integral(a(ω)*cos(ω*t) + b(ω)*sin(ω*t), ω = 0 .. ωc)
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ωc := 20
S1(t) := 1/π*integral(a(ω)*cos(ω*t) + b(ω)*sin(ω*t), ω = 0 .. ωc)
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Energy := integral(s(t)^2, t = 0 .. Tc)
E1 := 1/π*integral(|X(ω)|^2, ω = 0 .. 10)
E2 := 1/π*integral(|X(ω)|^2, ω = 0 .. 20)
E2 = 0.869782
E1 = 0.802219
Energy = 0.93919
