T := [100; 40; 20]
D := [1; 1; 1]
x1(t) := D[0]*cos(2*π/T[0]*t) + D[1]*cos(2*π/T[1]*t) + D[2]*cos(2*π/T[2]*t)
x2(t) :=
    (D[2]*cos(2*π/T[0]*t)) if 0 < t ≤ 3*T[0]
    (D[1]*cos(2*π/T[1]*t)) if 3*T[0] < t ≤ 7*T[0]
    (D[0]*cos(2*π/T[2]*t)) if 7*T[0] < t < 10*T[0]
t := 0 .. 10*T[0]
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a1(ω) := integral(x1(t)*cos(ω*t), t = 0 .. 10*T[0])
b1(ω) := integral(x1(t)*sin(ω*t), t = 0 .. 10*T[0])
a2(ω) := integral(x2(t)*cos(ω*t), t = 0 .. 10*T[0])
b2(ω) := integral(x2(t)*sin(ω*t), t = 0 .. 10*T[0])
X1(ω) := sqrt(a1(ω)^2 + b1(ω)^2)
φ1(ω) := arg(a1(ω) + 1i*b1(ω))
φ2(ω) := arg(a2(ω) + 1i*b2(ω))
X2(ω) := sqrt(a2(ω)^2 + b2(ω)^2)
u := 0 .. 600
ω := 0, 0.001 .. 0.35
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θ := -10, -9.95 .. 10
a := 1 .. 20
b := 0 .. 500
MHAT(θ) := (1 - θ^2)*e^(-θ^2/2)
Ψ(a, b, θ) := 1/sqrt(5*a)*MHAT((θ - 2*b)/(5*a))
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w1(a, b) := 1/sqrt(5*a)*integral(x1(τ)*Ψ(a, b, τ), τ = 0 .. 10*T[0])
w2(a, b) := 1/sqrt(5*a)*integral(x2(τ)*Ψ(a, b, τ), τ = 0 .. 8.5*T[0])
W1[a, b] := w1(a, b)
W2[a, b] := w2(a, b)
W1 =  # no stored result
W2 =  # no stored result
# [component: inputs W1, W1]
# [component: inputs W1]
# [component: inputs W2, W2]
# [component: inputs W2]
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# [component: inputs W2^T]
