i := 0 .. 127
x[i] := sin(i/128*14*π) + cos(i/128*19*π)
s[i] := x[i] + rnd(2) - 1
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y := fft(s)
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y := fft(s)
α := 2.5
j := 0 .. 64
z[j] := y[j]*Φ(|y[j]| - α)
h := ifft(z)
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W(i) := if(i < 11, 1, 0)
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Y[j] := W(j)*y[j]
X := ifft(Y)
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N := 512
n := 0 .. N - 1
r1[n] := rnd(4)
r2[n] := r1[n] - mean(r1)
k := 0 .. N/2
y := fft(x)
|y[26]| = 0.165807
x[n] := sin(0.1*π*n) + r2[n]
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ω[0] := 2*π*26/512 = 0.319068
